// COMSOL Multiphysics 5.1.0.234 model "halfcircle.mph"
// Outline of the model tree

Parameters
  R1 = 5[mm]
  R2 = 4[mm]
  d = 1[mm]
  L = 5[mm]

Geometry
  geom1 "Geometry 1" (2D, length unit m)
    c1: Circle | r = R1
    c2: Circle | r = R2
    dif1: Difference | input = c1; input2 = c2
    r1: Rectangle | pos = {-R1, 0}; size = {2*R1, R1}
    int1: Intersection | input = dif1, r1
    fin: Finalize "Form Union"

Materials
  mat1: Common "Copper" on no domains
    def "Basic"
      relpermeability = 1
      electricconductivity = 5.998e7[S/m]
      thermalexpansioncoefficient = 17e-6[1/K]
      heatcapacity = 385[J/(kg*K)]
      relpermittivity = 1
      density = 8700[kg/m^3]
      thermalconductivity = 400[W/(m*K)]
    Enu "Young's modulus and Poisson's ratio"
      youngsmodulus = 110e9[Pa]
      poissonsratio = 0.35
    linzRes "Linearized resistivity"
      rho0 = 1.72e-8[ohm*m]
      alpha = 0.0039[1/K]
      Tref = 298[K]

Physics
  emw: ElectromagneticWaves "Electromagnetic Waves, Frequency Domain" on all domains
    dependent variable E = {Ex, Ey, Ez}
    wee1: WaveEquationElectric (default)
    pec1: PerfectElectricConductor (default)
    init1: init "Initial Values 1" (default)
    efb1: ElectricField on no boundaries
  tl: TransmissionLine on all boundaries
    dependent variable V
    tle1: TransmissionLineEquation (default)
    ab1: AbsorbingBoundary (default)
    init1: init "Initial Values 1" (default)

Mesh
  mesh1 "Mesh 1" (physics-controlled)
    size: MeshSizeDefault | hauto = 5

Studies
  std1 "Study 1"
    bma: BoundaryModeAnalysis | modeFreq = 1[GHz]; neigs = 1; shift = 1
    freq: Frequency "Frequency Domain" | punit = Hz